*HEADING
cubit(deal.ii_codes/bug_tests/check_mesh/real/mesh/cylinder.inp): 08/06/2014: 22
version: 15.0.2
**
********************************** P A R T S **********************************
*PART, NAME=Part-Default
**
********************************** N O D E S **********************************
*NODE, NSET=ALLNODES
       1,    5.123317e-01,   -7.168127e-02,   -8.181818e-01
       2,    4.395704e-01,   -1.971053e-01,   -8.181818e-01
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**
********************************** E L E M E N T S ****************************
*ELEMENT, TYPE=C3D8R, ELSET=EB1
       1,       1,       2,       3,       4,       5,       6,       7,       8
       2,       4,       9,      10,       1,       8,      11,      12,       5
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**
********************************** S I D E S E T S **********************************
*ELSET, ELSET=SS2_S3
      91,      92,      93,      94,      95,      96
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*SURFACE, NAME=SS2
SS2_S3, S3
**
********************************** P R O P E R T I E S ************************
*SOLID SECTION, ELSET=EB1, MATERIAL=Default-Steel
**
*END PART
**
**
**
********************************** E N D   P A R T S **********************************
**
**
********************************** A S S E M B L Y ************************************
**
*ASSEMBLY, NAME=ASSEMBLY1
**
*INSTANCE, NAME=Part-Default_1, PART=Part-Default
*END INSTANCE
**
*END ASSEMBLY
**
**
**
**
************************************** H I S T O R Y *************************************
**
*PREPRINT
**
**************************************** S T E P 1 ***************************************
*STEP,INC=100,NAME=Default Set
**
*STATIC
1, 1, 1e-05, 1
**
**
**
**
*END STEP
